maxLevel := 20
# TODO: автоматизировать вычисление долей в хвостах функций. Например в обязательных расходах расходы на получение квестов на последнем урвоне должны составлять половину о тобщих расходов
# Функция используемая для вычисления всех кривых
levels := 1 .. maxLevel
megaf(level, k, d, b, y) := (k*e^((level - 1)/d) + y*level + b)
daysOnLevelInt(level, k, d, b) := k*e^((level - 1)/d) + b
totalDaysTilLevelInt(level, k, d, b) := sum(daysOnLevelInt(i, k, d, b), i = 1 .. level - 1)
totalDaysInGame(k, d, b) := totalDaysTilLevelInt(maxLevel, k, d, b)
levelWithFriends := 4*maxLevel/10
levelWithFriends = 8
# ---- Начинаем решать уравнение ----
k := 1
d := 7
b := 0
Given
daysOnLevelInt(1, k, d, b) == 0.1
totalDaysTilLevelInt(levelWithFriends, k, d, b) == 7
totalDaysInGame(k, d, b) == 360
r := Minerr(k, d, b)
r = [0.494318; 3.43576; -0.394318]
# ----- Закончили решать уравнение ------
totalDaysInGame(r[0], r[1], r[2]) = 360
daysOnLevel(level) := daysOnLevelInt(level, r[0], r[1], r[2])
totalDaysTilLevel(maxLevel) := totalDaysTilLevelInt(maxLevel, r[0], r[1], r[2])
# График количества дней, которые нужно потратить на зарабатывание следующего уровня (для 1 показывает, сколько дней нужно на 2)
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# ------------------------------------------------------------------------------------------------------------------------------
# уравнения - сколько опыта нужно на уровень - экспонента,
# кол-во опыта от разных источников, включаемых на разных уровнях,
# уменьшение опыта в день в зазвисимости от уровня
# --- Формула опыта на уровень ---
# -------------- задаем наши константы -------------------
levelToSolveQuests := 3
levelToProposeQuests := 12
# Опыта на уровень
ratToGainLevelInt(level, k, d, b) := k*e^((level - 1)/d) + b
# --- Источники опыта (все цифры - среднее за день) ---
ratForTasksInt(level, k, d, b, y) := k*level + b
ratForSubmitResultInt(level, k, d, b, y) :=
    0 if level < levelToSolveQuests
    megaf(level, k, d, b, y) if (level < levelToProposeQuests) and (level ≥ levelToSolveQuests)
    ratForSubmitResultInt(levelToProposeQuests - 1, k, d, b, y)*0.68 + megaf(level, k, d, b, y)*0.32 otherwise
ratForSubmitProposalInt(level, k, d, b, y) :=
    0 if level < levelToProposeQuests
    megaf(level, k, d, b, y) otherwise
# --- Сток опыта ---
ratDecreaseInt(level, k, d, b, y) := megaf(level, k, d, b, y)
# -------------------------------------------------------------------------------------------------------------
# Вычисляем кривую опыта отдельно. Соотношение опыта должно быть выше, чем соотношение дней.
level10to1 := daysOnLevel(10)/daysOnLevel(1)
level10to1 = 63.9214
level20to10 := daysOnLevel(20)/daysOnLevel(10)
level20to10 = 19.4385
k_rate := 1
d_rate := 1
b_rate := 1
Given
ratToGainLevelInt(1, k_rate, d_rate, b_rate) == 100
ratToGainLevelInt(10, k_rate, d_rate, b_rate) == 10000
ratToGainLevelInt(20, k_rate, d_rate, b_rate) == 500000
r_rate := Minerr(k_rate, d_rate, b_rate)
r_rate = [307.4; 2.56943; -207.4]
ratToGainLevel(level) := ratToGainLevelInt(level, r_rate[0], r_rate[1], r_rate[2])
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# ------- вычисление ежедневной потери --------
# Размер потери должен быть таким, чтобы чувак откатился на 0 за то количество дней, которое нужно, чтобы попасть на след уровень на 20-м, а не 1-м в 5 раз медленнее, таким образом угасание на старших уровнях должно быть в 5 раз быстрее относительно текущего состояния
k_dec := 1
d_dec := 1
b_dec := 1
y_dec := 1
errFuncDec(level, k, d, b, y) := (ratToGainLevel(level)/daysOnLevel(level))*(0.2 + 0.8*(level/maxLevel)) + ratDecreaseInt(level, k, d, b, y)
Given
errFuncDec(3, k_dec, d_dec, b_dec, y_dec) == 0  # we skip levels 1 and 2 sins they are about quests
errFuncDec(7, k_dec, d_dec, b_dec, y_dec) == 0
errFuncDec(14, k_dec, d_dec, b_dec, y_dec) == 0
errFuncDec(18, k_dec, d_dec, b_dec, y_dec) == 0
errFuncDec(20, k_dec, d_dec, b_dec, y_dec) == 0
r_dec := Minerr(k_dec, d_dec, b_dec, y_dec)
errFuncDec(levels, r_dec[0], r_dec[1], r_dec[2], r_dec[3]) = [22.662; 2.48394; -0.221665; -0.244491; 0.168493; 0.45795; 0.502471; 0.328699; 0.0164131; -0.340456; -0.652906; -0.847821; -0.87549; -0.715922; -0.385227; 0.0570788; 0.499172; 0.765854; 0.604755; -0.330738]
r_dec = [-426.439; 8.002; 190.761; 18.3401]
ratDecrease(level) := ratDecreaseInt(level, r_dec[0], r_dec[1], r_dec[2], r_dec[3])
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# --- Вычисляем профит от выполнения задач ---
# И не мудрствую лукаво просто считаем его равным 500 в день и баста
ratForTasks(level) := ratForTasksInt(level, 0, 0, 500, 0)
# --- Вычисляем первую часть профита от выполнения квестов ---
# Приведенные ниже функции можно использовать только в диапазоне от 3 до 13 включитльно
dailyRatChangeResult(level, k, d, b, y) := ratForTasks(level) + ratForSubmitResultInt(level, k, d, b, y) + ratDecrease(level)
errFuncResult(level, k, d, b, y) := ratToGainLevel(level)/dailyRatChangeResult(level, k, d, b, y) - daysOnLevel(level)
k_res := 1
d_res := 1
b_res := 1
y_res := 1
Given
errFuncResult(3, k_res, d_res, b_res, y_res) == 0
errFuncResult(5, k_res, d_res, b_res, y_res) == 0
errFuncResult(7, k_res, d_res, b_res, y_res) == 0
errFuncResult(10, k_res, d_res, b_res, y_res) == 0
r_res := Minerr(k_res, d_res, b_res, y_res)
r_res = [6881.25; 18.5365; -5953.7; -322.515]
levelsResult := 3, 4 .. 13
ratForSubmitResult(level) := ratForSubmitResultInt(level, r_res[0], r_res[1], r_res[2], r_res[3])
errFuncResult(levelsResult, r_res[0], r_res[1], r_res[2], r_res[3]) = [0; -0.000854947; 0; 0.00077246; 0; -0.00262007; -0.00490421; 0; 0.0272447; 1.74541; 5.26813]
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# ---- вычисляем вторую половину - опыт от создания квестов ----
dailyRatChangeProposal(level, k, d, b, y) := ratForTasks(level) + ratForSubmitResult(level) + ratForSubmitProposalInt(level, k, d, b, y) + ratDecrease(level)
errFuncProposal(level, k, d, b, y) := ratToGainLevel(level)/dailyRatChangeProposal(level, k, d, b, y) - daysOnLevel(level)
k_prop := 1
d_prop := 1
b_prop := 1
y_prop := 1
Given
errFuncProposal(12, k_prop, d_prop, b_prop, y_prop) == 0
errFuncProposal(15, k_prop, d_prop, b_prop, y_prop) == 0
errFuncProposal(18, k_prop, d_prop, b_prop, y_prop) == 0
errFuncProposal(20, k_prop, d_prop, b_prop, y_prop) == 0
r_prop := Minerr(k_prop, d_prop, b_prop, y_prop)
r_prop = [504.48; 7.83618; -1702.11; -9.08269]
ratForSubmitProposal(levels) := ratForSubmitProposalInt(levels, r_prop[0], r_prop[1], r_prop[2], r_prop[3])
levelsProp := 12, 13 .. 20
errFuncProposal(levelsProp, r_prop[0], r_prop[1], r_prop[2], r_prop[3]) = [0; 0.000181601; 0.000184259; -1.06581e-14; -0.000251817; -0.000330686; 2.84217e-14; 0.000588417; 0]
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# ----- Закончили решать уравнение ------
dailyRatChangeTotal(level) := ratForTasks(level) + ratForSubmitResult(level) + ratForSubmitProposal(level) + ratDecrease(level)
daysOnLevelActual(level) := ratToGainLevel(level)/dailyRatChangeTotal(level)
daysOnLevel(levels) = [0.1; 0.267; 0.49042; 0.78932; 1.1892; 1.72417; 2.43989; 3.39739; 4.67838; 6.39214; 8.68488; 11.7522; 15.8558; 21.3457; 28.6903; 38.5163; 51.6618; 69.2485; 92.7766; 124.253]
daysOnLevelActual(levels) = [0.353779; 1.00827; 0.49042; 0.788465; 1.1892; 1.72495; 2.43989; 3.39477; 4.67348; 6.39214; 8.71213; 11.7522; 15.856; 21.3459; 28.6903; 38.516; 51.6615; 69.2485; 92.7772; 124.253]
|daysOnLevelActual(levels) - daysOnLevel(levels)| = [0.253779; 0.741267; 0; 0.000854947; 0; 0.00077246; 0; 0.00262007; 0.00490421; 0; 0.0272447; 0; 0.000181601; 0.000184259; 1.06581e-14; 0.000251817; 0.000330686; 2.84217e-14; 0.000588417; 0]
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# ----------- Расчитываем частоту с которой надо давать задания на пропозалы ---------
proposalPeriodAtMaxLevel := 2
ratingForAProposalAtLevel(level) := proposalPeriodAtMaxLevel*ratForSubmitProposal(level)*(maxLevel/level)^3
proposalPeriodAtLevel(level) := ratingForAProposalAtLevel(level)/ratForSubmitProposal(level)
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# --------------------------------======= Расчет баланса по монеткам =======-------------------------------
# Принципы:
# 1. Без премиума монеток должно перестать хватать через полгода игры, если он тратит их только на самое необходимое. Или через 4 месяца. Так что берем уровень 16 за эту отправную точку.
# 2. Без премиума должно перестать хватать монеток на необходимое + друзья на 14-м уровне.
# 3. С премиумом монеток должно перестать хватать на последнем уровне на необходимое + друзья.
# 4. На все-все-все монеток должо перестать хватать с премиумом на 18-м уровне.
# 5. Монеток на все-все-все должно уходить примерно в 2 раза больше, чем на самое необходимое.
# -------------- задаем наши функции -------------------
premIncomeMult := 1.5
coinToSpentDailyInt(level, k, d, b) := megaf(level, k, d, b, 0)
coinIncomeInt(level, k, d, b, y) := megaf(level, k, d, b, y)
# -------------------- Вычисляем кривую трат ------------------------
k_spent := 1
d_spent := 1
b_spent := 1
Given
coinToSpentDailyInt(1, k_spent, d_spent, b_spent) == 100
coinToSpentDailyInt(10, k_spent, d_spent, b_spent) == 500
coinToSpentDailyInt(20, k_spent, d_spent, b_spent) == 2500
r_spent := Minerr(k_spent, d_spent, b_spent)
r_spent = [129.677; 6.39558; -29.6768]
coinToSpentDaily(level) := coinToSpentDailyInt(level, r_spent[0], r_spent[1], r_spent[2])
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# -------------------- Вычисляем кривую дохода и расходы на друзей ------------------------
levelForFeedFriends := 13
levelForFeedNeeds := 16
coin_k := -1
coin_d := -10
coin_b := 900
coin_y := 0
kf := 1.5
Given
coinIncomeInt(1, coin_k, coin_d, coin_b, coin_y) == coinToSpentDaily(1)*kf
coinIncomeInt(levelForFeedFriends, coin_k, coin_d, coin_b, coin_y) == coinToSpentDaily(levelForFeedFriends)*kf
coinIncomeInt(levelForFeedNeeds, coin_k, coin_d, coin_b, coin_y) == coinToSpentDaily(levelForFeedNeeds)
coinIncomeInt(maxLevel, coin_k, coin_d, coin_b, coin_y)*premIncomeMult == coinToSpentDaily(maxLevel)*kf
coin_r := Minerr(coin_k, coin_d, coin_b, kf)
coin_r = [554.199; 12.9782; -436.643; 1.17556]
coinIncome(level) := coinIncomeInt(level, coin_r[0], coin_r[1], coin_r[2], coin_y)
coinToSpentDailyFriends(level) := coinToSpentDaily(level)*coin_r[3]
coinIncome(1) = 117.556
coinIncome(14) = 1072.36
coinToSpentDailyFriends(14) = 1128.91
coinIncome(16) = 1323.78
coinToSpentDaily(16) = 1323.78
coinIncome(20)*premIncomeMult = 2938.89
coinToSpentDailyFriends(20) = 2938.89
# -------------  Вычисляем коеф на желаемые макс траты на уровне ----------------
# все деньги, что мы зарабатываем сверх премиума должны быть потрачены на 18-м уровне.
levelForFeedEverything := 12
kall := 1.5
Given
coinIncome(levelForFeedEverything)*premIncomeMult == coinToSpentDaily(levelForFeedEverything)*kall
r_feedAll := Minerr(kall)
r_feedAll = 1.85074
coinToSpentDailyAll(level) := coinToSpentDaily(level)*r_feedAll
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# -----------------======== Вычисляем источники дохода ==========-------------------
# -------------- задаем наши константы -------------------
levelToVoteProposals := 10
levelToVoteReviews := 14
levelToReviewResults := 16
levelToReviewProposals := 18
# -------------------- Вычисляем доход от заданий -------------------
# Считаем, что на первом уровне от заданий нужно получать все
coinForTasksInt(level, k, d, b, y) := k*level + b
b_coinTask := 1
Given
coinForTasksInt(1, 0, 0, b_coinTask, 0) == coinIncome(1)
r_coinForTask := Minerr(b_coinTask)
r_coinForTask = 117.556
# округляем до ближайшего делящегося на 50 числа в меньшую сторону
r_coinForTaskRounded := floor(r_coinForTask/50)*50
coinForTasks(level) := coinForTasksInt(level, 0, 0, r_coinForTaskRounded, 0)
coinForTasks(4) = 100
# -------------------- Вычисляем доход от оценки результата квестов -------------------
coinForVoteResultInt(level, k, d, b, y) :=
    0 if level < 1
    megaf(level, k, d, b, y) if (level < levelToVoteProposals) and (level ≥ 1)
    coinForVoteResultInt(levelToVoteProposals - 1, k, d, b, y)*0.85 + megaf(level, k, d, b, y)*0.15 otherwise
coinForVoteResultErr(level, k, d, b, y) := coinIncome(level) - coinForVoteResultInt(level, k, d, b, y) - coinForTasks(level)
k_coinResult := 1
d_coinResult := 1
b_coinResult := 1
y_coinResult := 1
Given
coinForVoteResultErr(1, k_coinResult, d_coinResult, b_coinResult, y_coinResult) == 0
coinForVoteResultErr(round(levelToVoteProposals*1/3), k_coinResult, d_coinResult, b_coinResult, y_coinResult) == 0
coinForVoteResultErr(round(levelToVoteProposals*2/3), k_coinResult, d_coinResult, b_coinResult, y_coinResult) == 0
coinForVoteResultErr(levelToVoteProposals - 1, k_coinResult, d_coinResult, b_coinResult, y_coinResult) == 0
r_coinResult := Minerr(k_coinResult, d_coinResult, b_coinResult, y_coinResult)
r_coinResult = [554.199; 12.9782; -536.643; -8.68374e-6]
coinForVoteResult(level) := coinForVoteResultInt(level, r_coinResult[0], r_coinResult[1], r_coinResult[2], r_coinResult[3])
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# -------------------- Вычисляем доход от оценки предложений квестов -------------------
coinForVoteProposalInt(level, k, d, b, y) :=
    0 if level < levelToVoteProposals
    megaf(level, k, d, b, y) if (level < levelToVoteReviews) and (level ≥ levelToVoteProposals)
    coinForVoteProposalInt(levelToVoteReviews - 1, k, d, b, y)*0.63 + megaf(level, k, d, b, y)*0.37 otherwise
# 0.8
coinForVoteProposalErr(level, k, d, b, y) := coinIncome(level) - coinForVoteProposalInt(level, k, d, b, y) - coinForTasks(level) - coinForVoteResult(level)
k_coinProposal := 1
d_coinProposal := 1
b_coinProposal := 1
y_coinProposal := 1
Given
coinForVoteProposalErr(levelToVoteProposals, k_coinProposal, d_coinProposal, b_coinProposal, y_coinProposal) == 0
coinForVoteProposalErr(levelToVoteProposals*0.3 + (levelToVoteReviews - 1)*0.7, k_coinProposal, d_coinProposal, b_coinProposal, y_coinProposal) == 0
coinForVoteProposalErr(levelToVoteProposals*0.7 + (levelToVoteReviews - 1)*0.3, k_coinProposal, d_coinProposal, b_coinProposal, y_coinProposal) == 0
coinForVoteProposalErr(levelToVoteReviews - 1, k_coinProposal, d_coinProposal, b_coinProposal, y_coinProposal) == 0
r_coinProposal := Minerr(k_coinProposal, d_coinProposal, b_coinProposal, y_coinProposal)
r_coinProposal = [471.066; 12.9782; -872.55; 0.000172356]
coinForVoteProposal(level) := coinForVoteProposalInt(level, r_coinProposal[0], r_coinProposal[1], r_coinProposal[2], r_coinProposal[3])
coinForVoteProposal(20) = 629.105
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# -------------------- Вычисляем доход от оценки вербальных ревью -------------------
coinForVoteReviewInt(level, k, d, b, y) :=
    0 if level < levelToVoteReviews
    megaf(level, k, d, b, y) if (level < levelToReviewResults) and (level ≥ levelToVoteReviews)
    coinForVoteReviewInt(levelToReviewResults - 1, k, d, b, y)*0.9 + megaf(level, k, d, b, y)*0.1 otherwise
coinForVoteReviewlErr(level, k, d, b, y) := coinIncome(level) - coinForVoteReviewInt(level, k, d, b, y) - coinForTasks(level) - coinForVoteResult(level) - coinForVoteProposal(level)
k_coinVoteReview := 1
d_coinVoteReview := 1
b_coinVoteReview := 1
y_coinVoteReview := 1
Given
coinForVoteReviewlErr(levelToVoteReviews, k_coinVoteReview, d_coinVoteReview, b_coinVoteReview, y_coinVoteReview) == 0
coinForVoteReviewlErr(levelToVoteReviews*0.3 + (levelToReviewResults - 1)*0.7, k_coinVoteReview, d_coinVoteReview, b_coinVoteReview, y_coinVoteReview) == 0
coinForVoteReviewlErr(levelToVoteReviews*0.7 + (levelToReviewResults - 1)*0.3, k_coinVoteReview, d_coinVoteReview, b_coinVoteReview, y_coinVoteReview) == 0
coinForVoteReviewlErr(levelToReviewResults - 1, k_coinVoteReview, d_coinVoteReview, b_coinVoteReview, y_coinVoteReview) == 0
r_coinVoteReview := Minerr(k_coinVoteReview, d_coinVoteReview, b_coinVoteReview, y_coinVoteReview)
r_coinVoteReview = [0.616402; 3.10221; -670.194; 49.2426]
coinForVoteReview(level) := coinForVoteReviewInt(level, r_coinVoteReview[0], r_coinVoteReview[1], r_coinVoteReview[2], r_coinVoteReview[3])
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# -------------------- Вычисляем доход от review результатов квестов -------------------
coinForReviewResultInt(level, k, d, b, y) :=
    0 if level < levelToReviewResults
    megaf(level, k, d, b, y) if (level < levelToReviewProposals) and (level ≥ levelToReviewResults)
    coinForReviewResultInt(levelToReviewProposals - 1, k, d, b, y)*0.83 + megaf(level, k, d, b, y)*0.17 otherwise
coinForReviewResultErr(level, k, d, b, y) := coinIncome(level) - coinForReviewResultInt(level, k, d, b, y) - coinForTasks(level) - coinForVoteResult(level) - coinForVoteProposal(level) - coinForVoteReview(level)
k_coinRevRes := 1
d_coinRevRes := 1
b_coinRevRes := 1
y_coinRevRes := 1
Given
coinForReviewResultErr(levelToReviewResults, k_coinRevRes, d_coinRevRes, b_coinRevRes, y_coinRevRes) == 0
coinForReviewResultErr((levelToReviewResults + levelToReviewProposals - 1)/2, k_coinRevRes, d_coinRevRes, b_coinRevRes, y_coinRevRes) == 0
coinForReviewResultErr(levelToReviewProposals - 1, k_coinRevRes, d_coinRevRes, b_coinRevRes, y_coinRevRes) == 0
r_coinRevRes := Minerr(k_coinRevRes, d_coinRevRes, b_coinRevRes, y_coinRevRes)
r_coinRevRes = [2.29807e-6; 1.05736; -938.738; 62.3908]
coinForReviewResult(level) := coinForReviewResultInt(level, r_coinRevRes[0], r_coinRevRes[1], r_coinRevRes[2], r_coinRevRes[3])
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# -------------------- Вычисляем доход от review предложений квестов -------------------
coinForReviewProposalInt(level, k, d, b, y) :=
    0 if level < levelToReviewProposals
    megaf(level, k, d, b, y) otherwise
coinForReviewProposalsErr(level, k, d, b, y) := (coinIncome(level) - coinForReviewProposalInt(level, k, d, b, y) - coinForTasks(level) - coinForVoteResult(level) - coinForVoteProposal(level)) - coinForReviewResult(level) - coinForVoteReview(level)
k_coinRevProp := 1
d_coinRevProp := 1
b_coinRevProp := 1
y_coinRevProp := 1
Given
coinForReviewProposalsErr(levelToReviewProposals, k_coinRevProp, d_coinRevProp, b_coinRevProp, y_coinRevProp) == 0
coinForReviewProposalsErr(round((levelToReviewProposals + maxLevel)/2), k_coinRevProp, d_coinRevProp, b_coinRevProp, y_coinRevProp) == 0
coinForReviewProposalsErr(maxLevel, k_coinRevProp, d_coinRevProp, b_coinRevProp, y_coinRevProp) == 0
r_coinRevProp := Minerr(k_coinRevProp, d_coinRevProp, b_coinRevProp, y_coinRevProp)
r_coinRevProp = [-1.59245e-7; 1.04938; -1086.68; 63.7812]
coinForReviewProposal(level) := coinForReviewProposalInt(level, r_coinRevProp[0], r_coinRevProp[1], r_coinRevProp[2], r_coinRevProp[3])
coinIncomeActual(level) := coinForVoteResult(level) + coinForTasks(level) + coinForVoteProposal(level) + coinForReviewResult(level) + coinForReviewProposal(level) + coinForVoteReview(level)
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# ------------ Вычисляем награду за голосования по квестам ------------
# вычисляем на основе интуиции. на последнем уровне бесплатно 100 голосований, а за награду 25
# TODO: посчитать расход на голосование сверх бесплатных.
rewardedResultVotesPerLevel(level) := floor(10*level^0.3)
freeResultVotesPerLevel(level) := floor(20*level^0.54)
freeResultVotesPerLevel(20) = 100
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# -------- Вычисляем вид функции награды -------
# требования:
# 25% длинны содержат 50% награды
# 100% длинны содержат 100% награды
# В 1 функция равна 0.
rewardFunctionInt(x, k, d, b) := k*e^(x/d) + b
x := 0, 0.001 .. 1
k_rew := 0.5
d_rew := -1
b_rew := -0.18
Given
integral(rewardFunctionInt(p, k_rew, d_rew, b_rew), p = 0 .. 1) == 1
integral(rewardFunctionInt(p, k_rew, d_rew, b_rew), p = 0 .. 0.25) == 0.5
rewardFunctionInt(1, k_rew, d_rew, b_rew) == 0
r_rew := Minerr(k_rew, d_rew, b_rew)
r_rew = [3.56295; -0.838274; -1.08076]
rewardFunction(x) := rewardFunctionInt(x, r_rew[0], r_rew[1], r_rew[2])
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# --------- Вычисляем награду за один голос за результат квеста ----------
rewardForVotingResultInt(level, voteNumber, k) := k*rewardFunction(voteNumber/(rewardedResultVotesPerLevel(level) + 1))
rewardForVotingResult(level, voteNumber) := rewardForVotingResultInt(level, voteNumber, coinForVoteResult(level)/sum(rewardForVotingResultInt(level, i, 1), i = 1 .. rewardedResultVotesPerLevel(level)))
# Вот это та самая формула, которую надо зафигачить в софтину
# коеф вычисялется, как отношение числа монет, которые нам надо заработать к награде пр икоефе равном 1. Все очень логично.
votes := 1, 2 .. rewardedResultVotesPerLevel(20)
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# ------------ Вычисляем награду за голосования по пропозалам ------------
# вычисляем на основе интуиции. на последнем уровне бесплатно 40 голосований, а за награду 10
rewardedProposalVotesPerLevel(level) := floor(4*(level + 1 - levelToVoteProposals)^0.39)
freeProposalVotesPerLevel(level) := floor(8*(level + 1 - levelToVoteProposals)^0.68)
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# --------- Вычисляем награду за один голос за предложние квеста ----------
rewardForVotingProposalInt(level, voteNumber, k) := k*rewardFunction(voteNumber/(rewardedProposalVotesPerLevel(level) + 1))
rewardForVotingProposal(level, voteNumber) := rewardForVotingProposalInt(level, voteNumber, coinForVoteProposal(level)/sum(rewardForVotingProposalInt(level, i, 1), i = 1 .. rewardedProposalVotesPerLevel(level)))
votes := 1, 2 .. rewardedProposalVotesPerLevel(maxLevel)
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# ------------ Вычисляем награду за голосования по вербальным обзорам ------------
# На последнем уровне кол-во голосов должно равняться сумме оценок за квесты и за предложения квестов
rewardedReviewVotesPerLevel(level) := floor(14*(level + 1 - levelToVoteReviews)^0.48)
rewardedReviewVotesPerLevel(20) = 35
rewardedReviewVotesPerLevel(19) = 33
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# --------- Вычисляем награду за один голос за оценку отзыва квеста ----------
rewardForVotingReviewInt(level, voteNumber, k) := k*rewardFunction(voteNumber/(rewardedReviewVotesPerLevel(level) + 1))
rewardForVotingReview(level, voteNumber) := rewardForVotingReviewInt(level, voteNumber, coinForVoteReview(level)/sum(rewardForVotingReviewInt(level, i, 1), i = 1 .. rewardedReviewVotesPerLevel(level)))
votes := 1, 2 .. rewardedReviewVotesPerLevel(maxLevel)
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# ------------ Вычисляем награду за обзор результата квеста ------------
# В начале только один в день, а под конец аж 3
rewardedResultReviewPerLevel(level) := floor(1*(level + 1 - levelToReviewResults)^0.7)
rewardedResultReviewPerLevel(20) = 3
rewardedResultReviewPerLevel(19) = 2
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# --------- Вычисляем награду за один ревью результата квеста ----------
rewardForResultReviewInt(level, voteNumber, k) := k*rewardFunction(voteNumber/(rewardedResultReviewPerLevel(level) + 1))
rewardForResultReview(level, voteNumber) := rewardForResultReviewInt(level, voteNumber, coinForReviewResult(level)/sum(rewardForResultReviewInt(level, i, 1), i = 1 .. rewardedResultReviewPerLevel(level)))
votes := 1, 2 .. rewardedResultReviewPerLevel(maxLevel)
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# ------------ Вычисляем награду за обзор предложения квеста ------------
# В начале только один в день, а под конец аж 2
rewardedProposalReviewPerLevel(level) := floor(1*(level + 1 - levelToReviewProposals)^0.8)
rewardedProposalReviewPerLevel(20) = 2
rewardedProposalReviewPerLevel(19) = 1
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# --------- Вычисляем награду за один ревью предложения квеста ----------
rewardForProposalReviewInt(level, voteNumber, k) := k*rewardFunction(voteNumber/(rewardedProposalReviewPerLevel(level) + 1))
rewardForProposalReview(level, voteNumber) := rewardForProposalReviewInt(level, voteNumber, coinForReviewProposal(level)/sum(rewardForProposalReviewInt(level, i, 1), i = 1 .. rewardedProposalReviewPerLevel(level)))
votes := 1, 2 .. rewardedProposalReviewPerLevel(maxLevel)
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# ------------============ Вычисляем необходимый расход =========---------------
# -------------------- Вычисляем расход на выполнение квестов -------------------
coinSelectQuestInt(level, k, d, b, y) :=
    0 if level < levelToSolveQuests
    megaf(level, k, d, b, y) if (level < levelToProposeQuests) and (level ≥ levelToSolveQuests)
    coinSelectQuestInt(levelToProposeQuests - 1, k, d, b, y)*0.63 + megaf(level, k, d, b, y)*0.37 otherwise
coinSelectQuestErr(level, k, d, b, y) := coinToSpentDaily(level) - coinSelectQuestInt(level, k, d, b, y)
k_coinSelQ := 1
d_coinSelQ := 1
b_coinSelQ := 1
y_coinSelQ := 1
Given
coinSelectQuestErr(levelToSolveQuests, k_coinSelQ, d_coinSelQ, b_coinSelQ, y_coinSelQ) == 0
coinSelectQuestErr(levelToSolveQuests*0.3 + (levelToProposeQuests - 1)*0.7, k_coinSelQ, d_coinSelQ, b_coinSelQ, y_coinSelQ) == 0
coinSelectQuestErr(levelToSolveQuests*0.7 + (levelToProposeQuests - 1)*0.3, k_coinSelQ, d_coinSelQ, b_coinSelQ, y_coinSelQ) == 0
coinSelectQuestErr(levelToProposeQuests - 1, k_coinSelQ, d_coinSelQ, b_coinSelQ, y_coinSelQ) == 0
r_coinSelQ := Minerr(k_coinSelQ, d_coinSelQ, b_coinSelQ, y_coinSelQ)
r_coinSelQ = [129.677; 6.39558; -29.6768; 4.90123e-7]
coinSelectQuest(level) := coinSelectQuestInt(level, r_coinSelQ[0], r_coinSelQ[1], r_coinSelQ[2], r_coinSelQ[3])
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# -------------------- Вычисляем расход на предложение квестов -------------------
coinProposeQuestInt(level, k, d, b, y) :=
    0 if level < levelToProposeQuests
    megaf(level, k, d, b, y) otherwise
coinProposeQuestErr(level, k, d, b, y) := coinToSpentDaily(level) - coinSelectQuest(level) - coinProposeQuestInt(level, k, d, b, y)
k_coinPropQ := 1
d_coinPropQ := 1
b_coinPropQ := 1
y_coinPropQ := 1
Given
coinProposeQuestErr(levelToProposeQuests, k_coinPropQ, d_coinPropQ, b_coinPropQ, y_coinPropQ) == 0
coinProposeQuestErr(levelToProposeQuests*0.3 + maxLevel*0.7, k_coinPropQ, d_coinPropQ, b_coinPropQ, y_coinPropQ) == 0
coinProposeQuestErr(levelToProposeQuests*0.7 + maxLevel*0.3, k_coinPropQ, d_coinPropQ, b_coinPropQ, y_coinPropQ) == 0
coinProposeQuestErr(maxLevel, k_coinPropQ, d_coinPropQ, b_coinPropQ, y_coinPropQ) == 0
r_coinPropQ := Minerr(k_coinPropQ, d_coinPropQ, b_coinPropQ, y_coinPropQ)
r_coinPropQ = [81.6964; 6.39558; -390.173; -6.64441e-6]
coinProposeQuest(level) := coinProposeQuestInt(level, r_coinPropQ[0], r_coinPropQ[1], r_coinPropQ[2], r_coinPropQ[3])
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# ------------============ Вычисляем расход на помощь друзей =========---------------
coinToSpentDailyFriendsOnly(level) := coinToSpentDailyFriends(level) - coinToSpentDaily(level)
# -------------- задаем наши константы -------------------
levelToInviteFriends := 6
# -------------------- Вычисляем расход на приглашение на выполнение квестов -------------------
coinInviteQuestInt(level, k, d, b, y) :=
    0 if level < levelToInviteFriends
    megaf(level, k, d, b, y) if (level < levelToProposeQuests) and (level ≥ levelToInviteFriends)
    coinInviteQuestInt(levelToProposeQuests - 1, k, d, b, y)*0.7 + megaf(level, k, d, b, y)*0.3 otherwise
coinInviteQuestErr(level, k, d, b, y) := coinToSpentDailyFriendsOnly(level) - coinInviteQuestInt(level, k, d, b, y)
k_coinInvQ := 1
d_coinInvQ := 1
b_coinInvQ := 1
y_coinInvQ := 1
Given
coinInviteQuestErr(levelToInviteFriends, k_coinInvQ, d_coinInvQ, b_coinInvQ, y_coinInvQ) == 0
coinInviteQuestErr(levelToInviteFriends*0.3 + (levelToProposeQuests - 1)*0.7, k_coinInvQ, d_coinInvQ, b_coinInvQ, y_coinInvQ) == 0
coinInviteQuestErr(levelToInviteFriends*0.7 + (levelToProposeQuests - 1)*0.3, k_coinInvQ, d_coinInvQ, b_coinInvQ, y_coinInvQ) == 0
coinInviteQuestErr(levelToProposeQuests - 1, k_coinInvQ, d_coinInvQ, b_coinInvQ, y_coinInvQ) == 0
r_coinInvQ := Minerr(k_coinInvQ, d_coinInvQ, b_coinInvQ, y_coinInvQ)
r_coinInvQ = [22.7658; 6.39558; -5.21; -1.87264e-6]
coinInviteQuest(level) := coinInviteQuestInt(level, r_coinInvQ[0], r_coinInvQ[1], r_coinInvQ[2], r_coinInvQ[3])
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coinToSpentDailyFriendsOnly(1) = 17.5558
coinToSpentDailyFriendsOnly(20) = 438.895
# -------------------- Вычисляем расход на приглашения в предложение квестов -------------------
coinInviteProposeInt(level, k, d, b, y) :=
    0 if level < levelToProposeQuests
    megaf(level, k, d, b, y) otherwise
coinInviteProposeErr(level, k, d, b, y) := coinToSpentDailyFriendsOnly(level) - coinInviteQuest(level) - coinInviteProposeInt(level, k, d, b, y)
k_coinInvP := 1
d_coinInvP := 1
b_coinInvP := 1
y_coinInvP := 1
Given
coinInviteProposeErr(levelToProposeQuests, k_coinInvP, d_coinInvP, b_coinInvP, y_coinInvP) == 0
coinInviteProposeErr(levelToProposeQuests*0.3 + maxLevel*0.7, k_coinInvP, d_coinInvP, b_coinInvP, y_coinInvP) == 0
coinInviteProposeErr(levelToProposeQuests*0.7 + maxLevel*0.3, k_coinInvP, d_coinInvP, b_coinInvP, y_coinInvP) == 0
coinInviteProposeErr(maxLevel, k_coinInvP, d_coinInvP, b_coinInvP, y_coinInvP) == 0
r_coinInvP := Minerr(k_coinInvP, d_coinInvP, b_coinInvP, y_coinInvP)
r_coinInvP = [15.936; 6.39558; -76.1088; 3.72051e-6]
coinInvitePropose(level) := coinInviteProposeInt(level, r_coinInvP[0], r_coinInvP[1], r_coinInvP[2], r_coinInvP[3])
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# ------------============ Вычисляем расход на все прочее =========---------------
# Since level 3 - Ask for another quest for several first quests in the list.
# Since level 6 - Friend requests for low level users.
# Since level 8 - Adding people to shortlist.
# Since level 12 - Ask for another quest theme for several first quest proposals in the list.
coinToSpentDailyAllOnly(level) := coinToSpentDailyAll(level) - coinToSpentDailyFriends(level)
# -------------- задаем наши константы -------------------
levelToShufleQuest := 3
levelToAskFriendship := 6
levelToShortlist := 8
# -------------------- Вычисляем расход на тасование квестов -------------------
coinShufleQuestInt(level, k, d, b, y) :=
    0 if level < levelToShufleQuest
    megaf(level, k, d, b, y) if (level < levelToAskFriendship) and (level ≥ levelToShufleQuest)
    coinShufleQuestInt(levelToAskFriendship - 1, k, d, b, y)*0.89 + megaf(level, k, d, b, y)*0.11 otherwise
coinShufleQuestErr(level, k, d, b, y) := coinToSpentDailyAllOnly(level) - coinShufleQuestInt(level, k, d, b, y)
k_coinShufQ := 1
d_coinShufQ := 1
b_coinShufQ := 1
y_coinShufQ := 1
Given
coinShufleQuestErr(levelToShufleQuest, k_coinShufQ, d_coinShufQ, b_coinInvQ, y_coinShufQ) == 0
coinShufleQuestErr(levelToShufleQuest*0.3 + (levelToAskFriendship - 1)*0.7, k_coinShufQ, d_coinShufQ, b_coinInvQ, y_coinShufQ) == 0
coinShufleQuestErr(levelToShufleQuest*0.7 + (levelToAskFriendship - 1)*0.3, k_coinShufQ, d_coinShufQ, b_coinInvQ, y_coinShufQ) == 0
coinShufleQuestErr(levelToAskFriendship - 1, k_coinShufQ, d_coinShufQ, b_coinInvQ, y_coinShufQ) == 0
r_coinShufQ := Minerr(k_coinShufQ, d_coinShufQ, b_coinInvQ, y_coinShufQ)
r_coinShufQ = [87.5555; 6.39558; -20.0373; 1.38673e-6]
coinShufleQuest(level) := coinShufleQuestInt(level, r_coinShufQ[0], r_coinShufQ[1], r_coinShufQ[2], r_coinShufQ[3])
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# -------------------- Вычисляем расход на добавление в друзья -------------------
coinAddFreindInt(level, k, d, b, y) :=
    0 if level < levelToAskFriendship
    megaf(level, k, d, b, y) if (level < levelToShortlist) and (level ≥ levelToAskFriendship)
    coinAddFreindInt(levelToShortlist - 1, k, d, b, y)*0.35 + megaf(level, k, d, b, y)*0.65 otherwise
coinAddFreindErr(level, k, d, b, y) := coinToSpentDailyAllOnly(level) - coinShufleQuest(level) - coinAddFreindInt(level, k, d, b, y)
k_coinAddF := 1
d_coinAddF := 1
b_coinAddF := 1
y_coinAddF := 1
Given
coinAddFreindErr(levelToAskFriendship, k_coinAddF, d_coinAddF, b_coinAddF, y_coinAddF) == 0
coinAddFreindErr(levelToAskFriendship*0.3 + (levelToShortlist - 1)*0.7, k_coinAddF, d_coinAddF, b_coinAddF, y_coinAddF) == 0
coinAddFreindErr(levelToAskFriendship*0.7 + (levelToShortlist - 1)*0.3, k_coinAddF, d_coinAddF, b_coinAddF, y_coinAddF) == 0
coinAddFreindErr(levelToShortlist - 1, k_coinAddF, d_coinAddF, b_coinAddF, y_coinAddF) == 0
r_coinAddF := Minerr(k_coinAddF, d_coinAddF, b_coinAddF, y_coinAddF)
r_coinAddF = [55.5868; 5.69543; -128.005; 3.15366]
coinAddFreind(level) := coinAddFreindInt(level, r_coinAddF[0], r_coinAddF[1], r_coinAddF[2], r_coinAddF[3])
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# -------------------- Вычисляем расход на добавление в шортлист -------------------
coinAddShortInt(level, k, d, b, y) :=
    0 if level < levelToShortlist
    megaf(level, k, d, b, y) if (level < levelToProposeQuests) and (level ≥ levelToShortlist)
    coinAddShortInt(levelToProposeQuests - 1, k, d, b, y)*1.0 + megaf(level, k, d, b, y)*0.0 otherwise
coinAddShortErr(level, k, d, b, y) := coinToSpentDailyAllOnly(level) - coinShufleQuest(level) - coinAddFreind(level) - coinAddShortInt(level, k, d, b, y)
k_coinShort := 1
d_coinShort := 1
b_coinShort := 1
y_coinShort := 1
Given
coinAddShortErr(levelToShortlist, k_coinShort, d_coinShort, b_coinShort, y_coinShort) == 0
coinAddShortErr(levelToShortlist*0.3 + (levelToProposeQuests - 1)*0.7, k_coinShort, d_coinShort, b_coinShort, y_coinShort) == 0
coinAddShortErr(levelToShortlist*0.7 + (levelToProposeQuests - 1)*0.3, k_coinShort, d_coinShort, b_coinShort, y_coinShort) == 0
coinAddShortErr(levelToProposeQuests - 1, k_coinShort, d_coinShort, b_coinShort, y_coinShort) == 0
r_coinShort := Minerr(k_coinShort, d_coinShort, b_coinShort, y_coinShort)
r_coinShort = [65.7762; 8.78777; -102.658; -3.93307]
coinAddShort(level) := coinAddShortInt(level, r_coinShort[0], r_coinShort[1], r_coinShort[2], r_coinShort[3])
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# -------------------- Вычисляем расход на шафл тем -------------------
coinShufleThemeInt(level, k, d, b, y) :=
    0 if level < levelToProposeQuests
    megaf(level, k, d, b, y) otherwise
coinShufleThemeErr(level, k, d, b, y) := coinToSpentDailyAllOnly(level) - coinShufleQuest(level) - coinAddFreind(level) - coinAddShort(level) - coinShufleThemeInt(level, k, d, b, y)
k_coinShTheme := 1
d_coinShTheme := 1
b_coinShTheme := 1
y_coinShTheme := 1
Given
coinShufleThemeErr(levelToProposeQuests, k_coinShTheme, d_coinShTheme, b_coinShTheme, y_coinShTheme) == 0
coinShufleThemeErr(levelToProposeQuests*0.3 + maxLevel*0.7, k_coinShTheme, d_coinShTheme, b_coinShTheme, y_coinShTheme) == 0
coinShufleThemeErr(levelToProposeQuests*0.7 + maxLevel*0.3, k_coinShTheme, d_coinShTheme, b_coinShTheme, y_coinShTheme) == 0
coinShufleThemeErr(maxLevel, k_coinShTheme, d_coinShTheme, b_coinShTheme, y_coinShTheme) == 0
r_coinShTheme := Minerr(k_coinShTheme, d_coinShTheme, b_coinShTheme, y_coinShTheme)
r_coinShTheme = [157.364; 11.5423; -228.653; -13.2232]
coinShufleTheme(level) := coinShufleThemeInt(level, r_coinShTheme[0], r_coinShTheme[1], r_coinShTheme[2], r_coinShTheme[3])
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# ------------ Вычисляем расход на пропуска каждого квеста -----------------
numberOfCoinsQuestSkip := 8
costToSkipQuestInt(level, questNumber, k) := k*((4/3)^questNumber)
costToSkipQuest(level, questNumber) := costToSkipQuestInt(level, questNumber, coinShufleQuest(level)/sum(costToSkipQuestInt(level, i, 1), i = 1 .. numberOfCoinsQuestSkip))
quests := 1, 2 .. numberOfCoinsQuestSkip
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# ------------ Вычисляем расход на пропуска каждого пропозала -----------------
numberOfCoinsProposalSkip := 4
costToSkipProposalInt(level, proposalNumber, k) := k*((5/3)^proposalNumber)
ktsp(level) := coinShufleTheme(level)/sum(costToSkipProposalInt(level, i, 1), i = 1 .. numberOfCoinsProposalSkip)
costToSkipProposal(level, questNumber) := costToSkipProposalInt(level, questNumber, ktsp(level))
quests := 1, 2 .. numberOfCoinsProposalSkip
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# ------------- Вычисляем количество доступных друзей на уровне -------------
# Есть предложение зафиксировать цену приглашения друга в голосование и тогда кривые расходов на друзей и количества друзей с уровнем будут совпадать.
numberOfFreindsOnLastLevel := 100
maxNumberOfFriendsOnLevel(level) := round(numberOfFreindsOnLastLevel/coinToSpentDailyFriendsOnly(maxLevel)*coinToSpentDailyFriendsOnly(level))
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# ------------ Вычисляем стоимость приглашения друга в наши работы для голосования ------------
coinToInviteFriendForVoteQuestResult(level) := floor(coinInviteQuest(level)/maxNumberOfFriendsOnLevel(level))
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coinToInviteFriendForVoteQuestProposal(level) := ceil(coinInvitePropose(level)/maxNumberOfFriendsOnLevel(level))
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# ---------- Вычисляем расход на добавление друзей в друзья --------
# Считаем, что в среднем игрок отправляет по 1 запрос в день на друзей, тогда расход на добавление друг равняется расходу а друзей для друга нашего уровня. А для друга ниже уровнем будет чуть пониже.
costToInviteFriendCoef(levelDifference) := 0.78475^levelDifference  # 0.886
costToInviteFriendCoef(19) = 0.00999759
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costToInviteFriend(level, levelDifference) := costToInviteFriendCoef(levelDifference)*coinAddFreind(level)
costToInviteFriend(6, 0) = 24.6494
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costToInviteFriend(6, 5) = 7.33606
costToInviteFriend(13, 0) = 259.274
costToInviteFriend(13, 10) = 22.9653
costToInviteFriend(20, 0) = 992.046
costToInviteFriend(20, 15) = 26.1518
# ---------- Вычисляем расход на шортлист одного друзья --------
# Считаем, что в среднем игрок отправляет по 10 запросов в день, тогда расход на добавление друг равняется расходу на шортлист поделенному на 10.
costToShortlistPerson(level) := coinAddShort(level)/10
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